##### overdamped dynamics of a sphere (with dipole attached to it) in 2D #####

variable  timezoom equal stride2(1000,2000,100,1375,1380,1)

units           lj
atom_style      atomic
dimension       2
newton off

read_data single_cell.data
neighbor        0.08 bin
neigh_modify    delay 1 check yes exclude type 1 2 exclude type 2 2

pair_style none

variable atomtype atom type
variable is_alive atom v_atomtype==1

group alive dynamic all var is_alive

fix integrator alive brownian 1.0 ${seed} rng uniform gamma_t 100.0
fix birthdeath all organism/birthdeath/logistic/ratchet1d 1 2 ${seed} 0.04 0.0001 0.08 500 0.1 1.0

#initialisation for the main run

# MSD

dump            1 all custom 1000 cleanper500/dump_run${run}.lammpstrj id type &
               x y z vx vy vz xu yu zu fx fy fz
dump_modify     1 first yes sort id

timestep        0.01
thermo_style custom f_birthdeath[*]
thermo          1000

# main run
run		50000
